// COMSOL Multiphysics 5.4.0.246 model "model_ht.mph"
// Outline of the model tree

Parameters
  x_window = 0.014697778401749316
  y_window = 0.04409333520524795
  t_core = 0.012728649475109152
  z_core = 0.025457298950218303
  d_gap = 7.5E-4
  r_curve = 0.003
  d_iso = 0.001
  r_fill = 5.0E-4
  d_mesh_core = 5e-3
  d_mesh_winding = 5e-3
  d_mesh_iso = 5e-3
  d_mesh_min = 0.1e-3
  mesh_growth = 1.6
  mesh_res = 0.1
  k_core = 5
  k_iso = 0.5
  k_winding_t = 20
  k_winding_n = 0.3
  P_winding = 0.5
  P_core = 0.5
  h_convection = 20
  fact_exposed = 1.0
  fact_internal = 0.25
  T_ambient = 273.15
  k_contact = 0.1
  d_contact = 100e-6

Variables
  var3 "vat_ht"
    h_exposed = fact_exposed*h_convection
    h_internal = fact_internal*h_convection
  var2 "var_all"
    fact_3d = 8
  var1 "var_fom"
    dT_core_max = max_core(T-T_ambient)
    dT_winding_max = max_winding(T-T_ambient)
    dT_core_avg = avg_core(T-T_ambient)
    dT_winding_avg = avg_winding(T-T_ambient)
    dT_iso_max = max_iso(T-T_ambient)

Selections
  sel1: Explicit "perfect_magnetic_conductor" on boundaries 3, 13, 17, 20, 34, 38
  sel2: Explicit "winding" on domains 4, 5
  sel3: Explicit "core" on domains 2
  sel7: Explicit "iso" on domains 1, 3
  sel5: Explicit "inlet" on boundaries 33
  sel6: Explicit "outlet" on boundaries 15
  uni1: Union "inlet_outlet" | entitydim = 2; input = {sel5, sel6}
  sel8: Explicit "exposed" on boundaries 7, 10, 14, 21, 24, 25, 43, 46, 47
  sel9: Explicit "internal" on boundaries 9, 12, 22
  sel10: Explicit "contact" on boundaries 6, 16, 18, 23, 26-28, 31, 32, 35, 37, 39, 41, 42, 44, 45

Couplings
  intop3: Integration "int_core" on selection sel3 | opname = int_core
  intop4: Integration "int_winding" on selection sel2 | opname = int_winding
  maxop1: Maximum "max_core" on selection sel3 | opname = max_core
  maxop2: Maximum "max_winding" on selection sel2 | opname = max_winding
  maxop3: Maximum "max_iso" on selection sel7 | opname = max_iso
  aveop1: Average "avg_core" on selection sel3 | opname = avg_core
  aveop2: Average "avg_winding" on selection sel2 | opname = avg_winding

Geometry
  geom1 "geom" (3D, length unit m)
    wp1: WorkPlane "wp_core" | quickplane = xz; unite = on
      r1: Rectangle "out" | pos = {0, d_gap/2}; size = {x_window+t_core, y_window/2-d_gap/2+t_core/2}
      r2: Rectangle "in" | pos = {t_core/2, d_gap/2}; size = {x_window, y_window/2-d_gap/2}
      dif1: Difference "diff" | input = r1; input2 = r2
      r3: Rectangle "iso" | size = {x_window+t_core, y_window/2+t_core/2}
      fil1: Fillet "fill" | point = dif1(1) points 3-7; radius = r_fill
    ext1: Extrude "core" | workplane = wp1; input = wp1; distance = z_core/2; reverse = on
    wp2: WorkPlane "wp_winding" | unite = on
      pol1: Polygon "poly"
        source = table
        table = 
          {t_core/2+d_iso, 0}
          {t_core/2+d_iso, z_core/2+r_curve+d_iso}
          {0, z_core/2+r_curve+d_iso}
          {0, z_core/2+r_curve+x_window-d_iso}
          {t_core/2+x_window-d_iso, z_core/2+r_curve+x_window-d_iso}
          {t_core/2+x_window-d_iso, 0}
      fil1: Fillet "fill_in" | point = pol1(1) points 4; radius = r_curve+d_iso
      fil2: Fillet "fill_out" | point = fil1(1) points 7; radius = r_curve+x_window-d_iso
    ext2: Extrude "winding" | workplane = wp2; input = wp2; distance = y_window/2-d_iso
    wp4: WorkPlane "wp_iso" | unite = on
      pol1: Polygon "poly"
        source = table
        table = 
          {t_core/2, z_core/2}
          {t_core/2, z_core/2+r_curve}
          {0, z_core/2+r_curve}
          {0, z_core/2+r_curve+x_window}
          {t_core/2+x_window, z_core/2+r_curve+x_window}
          {t_core/2+x_window, z_core/2}
      fil1: Fillet "fill_in" | point = pol1(1) points 4; radius = r_curve
      fil2: Fillet "fill_out" | point = fil1(1) points 6; radius = r_curve+x_window
    ext4: Extrude "iso" | workplane = wp4; input = wp4; distance = y_window/2
    pt1: Point "pts" | p = {0, z_core/2, y_window/2}
    ls1: LineSegment "segement" | vertex1 = pt1(1) points 1; vertex2 = ext4(1) points 10
    fin: Finalize "union"

Materials
  mat4: Common "iso" on selection sel7
    def "Basic"
      density = 0
      heatcapacity = 0
      thermalconductivity = k_iso
  mat2: Common "core" on selection sel3
    def "Basic"
      thermalconductivity = k_core
      density = 0
      heatcapacity = 0
  mat3: Common "winding" on selection sel2
    def "Basic"
      density = 0
      heatcapacity = 0
      thermalconductivity = diag{k_winding_t, k_winding_n, k_winding_n}
  mat5: Common "contact_mat" on no domains
    def "Basic"
      density = 0
      heatcapacity = 0
      thermalconductivity = k_contact
  slmat1: SingleShell "contact_layer" on selection sel10 | layername = contact; thickness = d_contact; link = mat5

Physics
  cc: CurvilinearCoordinates on all domains
    Settings.CreateBasis = 1
    css1: CoordinateSystemSettings "coord" | SecondVector = z
    diff1: DiffusionMethod "diff" on selection sel2
      wall1: WallDefault "Wall 1" (default)
      inl1: Inlet on selection sel5
      out1: Outlet on selection sel6
  ht: HeatTransfer on all domains
    dependent variable T
    solid1: SolidHeatTransferModel "solid" (default)
    init1: init "initial" (default)
    ins1: ThermalInsulation "insulation" (default)
    solid2: SolidHeatTransferModel "winding_coord" on selection sel2 | coordinateSystem = cc_cs
    hs1: HeatSource "winding_losses" on selection sel2 | heatSourceType = HeatRate; P0 = P_winding/fact_3d
    hs2: HeatSource "core_losses" on selection sel3 | heatSourceType = HeatRate; P0 = P_core/fact_3d
    hf1: HeatFluxBoundary "flux_exposed" on selection sel8
      HeatFluxType = ConvectiveHeatFlux
      q0 = h_exposed
      h = h_exposed
      Text = T_ambient
    hf2: HeatFluxBoundary "flux_internal" on selection sel9
      HeatFluxType = ConvectiveHeatFlux
      q0 = h_internal
      h = h_internal
      Text = T_ambient
    sls1: SolidLayeredShell "contact" on selection sel10

Mesh
  mesh1 "mesh"
    size: MeshSizeDefault | hmax = 0.00304; hmin = 5.48E-4; hcurve = 0.6; hnarrow = 0.5; hgrad = 1.5
    ftet1: FreeTet "tetrahedral" on remaining entities
      size1: Size "core" on selection sel3
        hmax = d_mesh_core
        hmin = d_mesh_min
        hnarrow = mesh_res
        hgrad = mesh_growth
        custom = on
      size2: Size "winding" on selection sel2
        hmax = d_mesh_winding
        hmin = d_mesh_min
        hnarrow = mesh_res
        hgrad = mesh_growth
        custom = on
      size4: Size "iso" on selection sel7
        hmax = d_mesh_iso
        hmin = d_mesh_min
        hnarrow = mesh_res
        hgrad = mesh_growth
        custom = on

Studies
  std1 "study"
    stat: Stationary "cc" | solve for = {cc}
    stat2: Stationary "ht" | solve for = {ht}

Solver configurations
  sol1 "soil" (study std1)
    v1: Variables "Dependent Variables 1"
    s1: Stationary "Stationary Solver 1"
      dDef: Direct
      fc1: FullyCoupled
    su1: StoreSolution
    v2: Variables "Dependent Variables 2" | initmethod = sol; notsolmethod = sol
    s2: Stationary "Stationary Solver 2"
      fc1: FullyCoupled | initstep = 0.01; minstep = 1.0E-6; maxiter = 50
      d1: Direct "PARDISO (ht)" | linsolver = pardiso; pivotperturb = 1.0E-13
  sol2 "Solution Store 1" (study std1)

Datasets
  dset1: Solution "sol" | solution = sol1
  dset2: Solution "sol_tmp" | solution = sol2

Derived values
  gev1: EvalGlobal "fom"
    data = dset1
    expr = {dT_core_max, dT_winding_max, dT_core_avg, dT_winding_avg, dT_iso_max}
    unit = {K, K, K, K, K}

Plots
  pg1: PlotGroup3D "coordinate" | data = dset1
    arwv1: ArrowVolume "arrow" | expr = {cc.vX, cc.vY, cc.vZ}
  pg2: PlotGroup3D "T" | data = dset1
    vol1: Volume | expr = T-T_ambient; unit = K