// COMSOL Multiphysics 5.4.0.246 model "model_mf.mph"
// Outline of the model tree

Parameters
  x_window = 0.014697778401749316
  y_window = 0.04409333520524795
  t_core = 0.012728649475109152
  z_core = 0.025457298950218303
  d_gap = 7.5E-4
  r_curve = 0.003
  d_iso = 0.001
  d_air = 0.02
  r_fill = 5.0E-4
  d_mesh_core = 5e-3
  d_mesh_winding = 5e-3
  d_mesh_air = 5e-3
  d_mesh_min = 0.1e-3
  mesh_growth = 1.6
  mesh_res = 0.1
  mu_core = 1000
  beta_core = 2.5
  I_winding = 1

Variables
  var2 "var_all"
    fact_3d = 8
    fact_sym = 2
    V_core = fact_3d*int_core(1)
    V_winding = fact_3d*int_winding(1)
  var1 "var_fom"
    L_var = mf.normB*mf.normH
    L_norm = (fact_3d*int_all(L_var))/(I_winding^2)
    B_var = (mf.normB^beta_core)
    B_int = fact_3d*int_core(B_var)
    B_norm = ((B_int/V_core)^(1/beta_core))/I_winding
    J_var = mf.normJ^2
    J_int = fact_3d*int_winding(J_var)
    J_norm = ((J_int/V_winding)^(1/2))/I_winding
    H_var = mf.normH^2
    H_int = fact_3d*int_winding(H_var)
    H_norm = ((H_int/V_winding)^(1/2))/I_winding

Selections
  sel1: Explicit "perfect_magnetic_conductor" on boundaries 3, 12, 15
  sel2: Explicit "winding" on domains 3
  sel3: Explicit "core" on domains 2
  sel4: Explicit "air" on domains 1
  sel5: Explicit "inlet" on boundaries 24
  sel6: Explicit "outlet" on boundaries 10
  uni1: Union "inlet_outlet" | entitydim = 2; input = {sel5, sel6}

Couplings
  intop2: Integration "int_all" on all domains | opname = int_all
  intop3: Integration "int_core" on selection sel3 | opname = int_core
  intop4: Integration "int_winding" on selection sel2 | opname = int_winding

Geometry
  geom1 "geom" (3D, length unit m)
    wp1: WorkPlane "wp_core" | quickplane = xz; unite = on
      r1: Rectangle "out" | pos = {0, d_gap/2}; size = {x_window+t_core, y_window/2-d_gap/2+t_core/2}
      r2: Rectangle "in" | pos = {t_core/2, d_gap/2}; size = {x_window, y_window/2-d_gap/2}
      dif1: Difference "diff" | input = r1; input2 = r2
      fil1: Fillet "fill" | point = dif1(1) points 3-7; radius = r_fill
    ext1: Extrude "core" | workplane = wp1; input = wp1; distance = z_core/2; reverse = on
    wp2: WorkPlane "wp_winding" | unite = on
      pol1: Polygon "poly"
        source = table
        table = 
          {t_core/2+d_iso, 0}
          {t_core/2+d_iso, z_core/2+r_curve+d_iso}
          {0, z_core/2+r_curve+d_iso}
          {0, z_core/2+r_curve+x_window-d_iso}
          {t_core/2+x_window-d_iso, z_core/2+r_curve+x_window-d_iso}
          {t_core/2+x_window-d_iso, 0}
      fil1: Fillet "fill_in" | point = pol1(1) points 4; radius = r_curve+d_iso
      fil2: Fillet "fill_out" | point = fil1(1) points 7; radius = r_curve+x_window-d_iso
    ext2: Extrude "winding" | workplane = wp2; input = wp2; distance = y_window/2-d_iso
    blk1: Block "box" | size = {x_window+t_core+d_air, z_core/2+r_curve+x_window-d_iso+d_air, y_window/2+t_core/2+d_air}
    fin: Finalize "union"

Materials
  mat1: Common "air" on selection sel4
    def "Basic"
      relpermeability = 1
      relpermittivity = 1
      electricconductivity = 0
  mat2: Common "core" on selection sel3
    def "Basic"
      relpermeability = mu_core
      electricconductivity = 0
      relpermittivity = 1
  mat3: Common "winding" on selection sel2
    def "Basic"
      relpermeability = 1
      relpermittivity = 1

Physics
  mf: InductionCurrents on all domains
    dependent variable A = {Ax, Ay, Az}
    al1: AmperesLaw "ampere" (default)
    mi1: MagneticInsulation (default)
    init1: init "initial" (default)
    pmc1: PerfectMagneticConductor on selection sel1
    gfa1: GaugeFixingA "gauge" on all domains
    coil1: Coil "winding" on selection sel2
      ConductorModel = Multi
      CoilType = Numeric
      CoilName = winding
      ICoil = I_winding/fact_sym
      N = 1
      sigmaCoil = 0
      coilWindArea = 0
      ccc1: CoilCurrentCalculation "geom" (default)
        ct1: CoilTerminal "inlet" on selection sel5
        cg1: CoilGround "outlet" on selection sel6

Mesh
  mesh1 "mesh"
    size: MeshSizeDefault | hmax = 0.00494; hmin = 8.9E-4; hcurve = 0.6; hnarrow = 0.5; hgrad = 1.5
    ftet1: FreeTet "tetrahedral" on remaining entities
      size1: Size "core" on selection sel3
        hmax = d_mesh_core
        hmin = d_mesh_min
        hnarrow = mesh_res
        hgrad = mesh_growth
        custom = on
      size2: Size "winding" on selection sel2
        hmax = d_mesh_winding
        hmin = d_mesh_min
        hnarrow = mesh_res
        hgrad = mesh_growth
        custom = on
      size3: Size "air" on domains 1
        hmax = d_mesh_air
        hmin = d_mesh_min
        hnarrow = mesh_res
        hgrad = mesh_growth
        custom = on

Studies
  std1 "study"
    ccc: CoilCurrentCalculation "coil"
    stat: Stationary "mf"

Solver configurations
  sol1 "sol" (study std1)
    v1: Variables "Dependent Variables 1"
    s1: Stationary "Stationary Solver 1"
      dDef: Direct
      se1: Segregated | segterm = itertol; segiter = 6
        ss1: SegregatedStep | segvar = {comp1_mf_coil1_ccc1_s}
        ss2: SegregatedStep | segvar = {comp1_mf_coil1_ccc1_p, comp1_mf_coil1_ccc1_lm}
    su1: StoreSolution
    v2: Variables "Dependent Variables 2" | initmethod = sol; notsolmethod = sol
    s2: Stationary "Stationary Solver 2"
      fc1: FullyCoupled
      d1: Direct | linsolver = pardiso
  sol2 "Solution Store 1" (study std1)

Datasets
  dset2: Solution "sol" | solution = sol1
  dset3: Solution "sol_tmp" | solution = sol2

Derived values
  gev1: EvalGlobal "fom" | data = dset2; expr = {L_norm, B_norm, J_norm, H_norm}; unit = {J, , A/m^2, A/m}

Plots
  pg2: PlotGroup3D "B" | data = dset2
    vol1: Volume | expr = mf.normB; unit = mT
  pg1: PlotGroup3D "H" | data = dset2
    vol1: Volume | expr = mf.normH; unit = A/mm; descr = Magnetic field norm
  pg4: PlotGroup3D "J" | data = dset2
    vol1: Volume | expr = mf.normJ; unit = A/mm^2; descr = Current density norm
  pg3: PlotGroup3D "vector" | data = dset2
    arwv1: ArrowVolume "B" | expr = {mf.Bx, mf.By, mf.Bz}
    arwv2: ArrowVolume "J" | expr = {mf.Jx, mf.Jy, mf.Jz}; descr = Current density